// COMSOL Multiphysics 6.3.0.290 model "joule_heating.mph"
// Outline of the model tree

Parameters
  P_hand = 0.1^2 / 1.67e-4

Geometry
  geom1 "wire" (3D, length unit mm)
    blk1: Block | size = {10, 1, 1}
    fin: Finalize "Form Union"

Materials
  mat1: Common "Copper" on all domains
    def: def "Basic"
      relpermeability = 1
      electricconductivity = 5.998e7[S/m]
      thermalexpansioncoefficient = 17e-6[1/K]
      heatcapacity = 385[J/(kg*K)]
      relpermittivity = 1
      density = 8960[kg/m^3]
      thermalconductivity = 400[W/(m*K)]
    Enu: Enu "Young's modulus and Poisson's ratio"
      E = 110[GPa]
      nu = 0.35
    linzRes: linzRes "Linearized resistivity"
      rho0 = 1.72e-8[ohm*m]
      alpha = 0.0039[1/K]
      Tref = 298[K]

Physics
  ec: ConductiveMedia "Electric Currents" on all domains
    dependent variable V
    cucn1: CurrentConservation (default)
    ein1: ElectricInsulation (default)
    init1: init "Initial Values 1" (default)
    gnd1: Ground on boundaries 1
    pot1: ElectricPotential on boundaries 6 | V0 = 0.1
  ht: HeatTransfer "Heat Transfer in Solids" on all domains
    dependent variable T
    solid1: SolidHeatTransferModel "Solid 1" (default)
    init1: init "Initial Values 1" (default)
    ins1: ThermalInsulation (default)
    temp1: TemperatureBoundary "Temperature 1" on boundaries 1, 6

Multiphysics
  emh1: ElectromagneticHeating on all domains | EMHeat_physics = ec; Heat_physics = ht

Mesh
  mesh1 "Mesh 1" (physics-controlled)

Studies
  std1 "Study 1"
    stat: Stationary

Solver configurations
  sol1 "Solution 1" (study std1)
    v1: Variables "Dependent Variables 1"
    s1: Stationary "Stationary Solver 1"
      se1: Segregated
        ss1: SegregatedStep "Electric Currents"
        ss2: SegregatedStep "Temperature"
        ll1: LowerLimit
      i1: Iterative
        mg1: Multigrid
      d1: Direct "Direct, heat transfer variables (ht)"

Datasets
  dset1: Solution | solution = sol1

Plots
  pg1: PlotGroup3D "Electric Potential (ec)" | data = dset1
    vol1: Volume | expr = V
  pg2: PlotGroup3D "Electric Field (ec)" | data = dset1
    mslc1: Multislice
      expr = ec.normE
      multiplanexmethod = coord
      xcoord = ec.CPx
      multiplaneymethod = coord
      ycoord = ec.CPy
      multiplanezmethod = coord
      zcoord = ec.CPz
    strmsl1: StreamlineMultislice
      expr = {ec.Ex, ec.Ey, ec.Ez}
      multiplanexmethod = coord
      xcoord = ec.CPx
      multiplaneymethod = coord
      ycoord = ec.CPy
      multiplanezmethod = coord
      zcoord = ec.CPz
      udist = 0.02
      maxsteps = 5000
      col1: Color "Color Expression 1" | expr = ec.normE
      filt1: Filter | expr = !isScalingSystemDomain
  pg3: PlotGroup3D "Temperature (ht)" | data = dset1
    vol1: Volume | expr = T

Exports
  img1: Image | size = current; unit = px; width = 800; height = 600